*HEADING
ABAQUS job created on 13-Oct-00 at 14:52:27
**
*PREPRINT, CONTACT=NO, ECHO=NO, HISTORY=NO, MODEL=NO
*NODE
       1,            0.,            0.
       2,      0.798166,            0.
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**
**
*ELEMENT, TYPE=CPE4, ELSET=P1
       1,       1,       2,     112,     111
       2,       2,       3,     113,     112
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*ELEMENT, TYPE=CPE4, ELSET=DESIGN_ELEM
     110,     111,     112,     222,     221
     111,     112,     113,     223,     222
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**
** pshell1
**
*SOLID SECTION, ELSET=P1, MATERIAL=MAT11
          1.,
**
** DESIGN_ELEM
**
*SOLID SECTION, ELSET=DESIGN_ELEM, MATERIAL=MAT11
          1.,
**
** mat11
**
*MATERIAL, NAME=MAT11
**
*ELASTIC, TYPE=ISO
     210000.,         0.3
**
*NSET, NSET=SPC11
    3961,
*NSET, NSET=SPC13
       1,     111,     221,     331,     441,     551
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*NSET, NSET=FORCE1
     109,      110
*ELSET, ELSET=frozen_elements, GENERATE
  1,109,1
  218,3815,109
  3816,3924,1
**
** Step  1, step1
** LoadCase, DEFAULT.SC1
**
*STEP, AMPLITUDE=RAMP, PERTURBATION
**
*STATIC
**
*BOUNDARY, OP=NEW
SPC11, 1,,          0.
SPC11, 2,,          0.
SPC13, 1,,          0.
**
*CLOAD, OP=NEW
4070, 1, 0.
FORCE1, 1,  0.
FORCE1, 2,     39.9089
**
**
*END STEP
